n := 0 .. 14
freq := [261.63; 293.66; 329.63; 349.23; 392.00; 440.00; 493.88; 523.25; 587.33; 659.26; 698.46; 783.99; 880.00; 987.77; 1046.50]*Hz
0.000190735 MHz = 190.735 Hz
0.000762939 MHz = 762.939 Hz
v := [
    3.822*10^5;
    3.405*10^5;
    3.034*10^5;
    2.863*10^5;
    2.551*10^5;
    2.273*10^5;
    2.025*10^5;
    1.911*10^5;
    1.703*10^5;
    1.517*10^5;
    1.432*10^5;
    1.276*10^5;
    1.136*10^5;
    1.012*10^5;
    9.556*10^4
]
0.001525879 MHz = 1525.88 Hz
values[n] := 100 MHz/freq[n]
2^19 = 524288
values = [382219; 340530; 303370; 286344; 255102; 227273; 202478; 191113; 170262; 151685; 143172; 127553; 113636; 101238; 95556.6]
val[n] := 100 MHz/v[n]
2^18 = 262144
2^17 = 131072
2^16 = 65536
2^15 = 32768
val = [261.643; 293.686; 329.598; 349.284; 392.003; 439.947; 493.827; 523.286; 587.199; 659.196; 698.324; 783.699; 880.282; 988.142; 1046.46] Hz
100 MHz/freq[n] = [382219; 340530; 303370; 286344; 255102; 227273; 202478; 191113; 170262; 151685; 143172; 127553; 113636; 101238; 95556.6]
50 MHz/freq[n] = [191110; 170265; 151685; 143172; 127551; 113636; 101239; 95556.6; 85131; 75842.6; 71586.1; 63776.3; 56818.2; 50619.1; 47778.3]
2^15 = 32768
2^16 = 65536
2^17 = 131072
2^18 = 262144
2^19 = 524288
3.3 V/(4 Ω) = 0.825 A
3.3 V*(0.825 A) = 2.7225 W
